*HEADING
C:\Users\ZHANJIE LI\Documents\RESEARCH\Abaqusmaker\abaqusmaker_final\abaqus_me_subs\abaqus_me 01-Mar-2011 15:15:46
*NODE,NSET=ALL
1,0.000000,2.500000,0.750000
2,0.000000,2.500000,0.630000
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*ELEMENT,TYPE=S9R5,ELSET=STRIP1
1,1,3,203,201,2,103,202,101,102
2,201,203,403,401,202,303,402,301,302
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*SHELL SECTION, ELSET=STRIP1, MATERIAL=MAT100
0.060000
*ELEMENT,TYPE=S9R5,ELSET=STRIP2
41,3,5,205,203,4,105,204,103,104
42,203,205,405,403,204,305,404,303,304
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*SHELL SECTION, ELSET=STRIP2, MATERIAL=MAT100
0.060000
*ELEMENT,TYPE=S9R5,ELSET=STRIP3
81,5,7,207,205,6,107,206,105,106
82,205,207,407,405,206,307,406,305,306
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*SHELL SECTION, ELSET=STRIP3, MATERIAL=MAT100
0.060000
*ELEMENT,TYPE=S9R5,ELSET=STRIP4
121,7,9,209,207,8,109,208,107,108
122,207,209,409,407,208,309,408,307,308
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*SHELL SECTION, ELSET=STRIP4, MATERIAL=MAT100
0.060000
*ELEMENT,TYPE=S9R5,ELSET=STRIP5
161,9,11,211,209,10,111,210,109,110
162,209,211,411,409,210,311,410,309,310
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*SHELL SECTION, ELSET=STRIP5, MATERIAL=MAT100
0.060000
*ELEMENT,TYPE=S9R5,ELSET=STRIP6
201,11,13,213,211,12,113,212,111,112
202,211,213,413,411,212,313,412,311,312
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*SHELL SECTION, ELSET=STRIP6, MATERIAL=MAT100
0.060000
*ELEMENT,TYPE=S9R5,ELSET=STRIP7
241,13,15,215,213,14,115,214,113,114
242,213,215,415,413,214,315,414,313,314
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*SHELL SECTION, ELSET=STRIP7, MATERIAL=MAT100
0.060000
*ELEMENT,TYPE=S9R5,ELSET=STRIP8
281,15,17,217,215,16,117,216,115,116
282,215,217,417,415,216,317,416,315,316
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*SHELL SECTION, ELSET=STRIP8, MATERIAL=MAT100
0.060000
*ELEMENT,TYPE=S9R5,ELSET=STRIP9
321,17,19,219,217,18,119,218,117,118
322,217,219,419,417,218,319,418,317,318
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*SHELL SECTION, ELSET=STRIP9, MATERIAL=MAT100
0.060000
*ELEMENT,TYPE=S9R5,ELSET=STRIP10
361,19,21,221,219,20,121,220,119,120
362,219,221,421,419,220,321,420,319,320
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*SHELL SECTION, ELSET=STRIP10, MATERIAL=MAT100
0.060000
*ELEMENT,TYPE=S9R5,ELSET=STRIP11
401,21,23,223,221,22,123,222,121,122
402,221,223,423,421,222,323,422,321,322
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*SHELL SECTION, ELSET=STRIP11, MATERIAL=MAT100
0.060000
*ELEMENT,TYPE=S9R5,ELSET=STRIP12
441,23,25,225,223,24,125,224,123,124
442,223,225,425,423,224,325,424,323,324
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*SHELL SECTION, ELSET=STRIP12, MATERIAL=MAT100
0.060000
*ELEMENT,TYPE=S9R5,ELSET=STRIP13
481,25,27,227,225,26,127,226,125,126
482,225,227,427,425,226,327,426,325,326
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*SHELL SECTION, ELSET=STRIP13, MATERIAL=MAT100
0.060000
*ELEMENT,TYPE=S9R5,ELSET=STRIP14
521,27,29,229,227,28,129,228,127,128
522,227,229,429,427,228,329,428,327,328
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*SHELL SECTION, ELSET=STRIP14, MATERIAL=MAT100
0.060000
*ELEMENT,TYPE=S9R5,ELSET=STRIP15
561,29,31,231,229,30,131,230,129,130
562,229,231,431,429,230,331,430,329,330
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*SHELL SECTION, ELSET=STRIP15, MATERIAL=MAT100
0.060000
*ELEMENT,TYPE=S9R5,ELSET=STRIP16
601,31,33,233,231,32,133,232,131,132
602,231,233,433,431,232,333,432,331,332
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*SHELL SECTION, ELSET=STRIP16, MATERIAL=MAT100
0.060000
*ELEMENT,TYPE=S9R5,ELSET=STRIP17
641,33,35,235,233,34,135,234,133,134
642,233,235,435,433,234,335,434,333,334
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*SHELL SECTION, ELSET=STRIP17, MATERIAL=MAT100
0.060000
*ELEMENT,TYPE=S9R5,ELSET=STRIP18
681,35,37,237,235,36,137,236,135,136
682,235,237,437,435,236,337,436,335,336
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*SHELL SECTION, ELSET=STRIP18, MATERIAL=MAT100
0.060000
*MATERIAL, NAME=MAT100
*ELASTIC, TYPE=ISOTROPIC
29500.000000,0.300000
*NSET, NSET=END1
1
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*NSET, NSET=END2
8001
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*NSET, NSET=MIDDLE
4001
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*BOUNDARY
END1,2,3
END2,2,3
MIDDLE,1,1
*STEP
*STATIC
0.1
*CLOAD
1,1,0.002500
2,1,0.010000
3,1,0.005000
4,1,0.010000
5,1,0.004431
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8037,1,-0.002500
*OUTPUT, FIELD
*ELEMENT OUTPUT
1,3,5
S,E
*NODE OUTPUT
U
*END STEP
